# OpenSim document version 30000
Model TTAmp_Left_Passive:
  length_units: meters
  force_units: N
  gravity: 0 -9.80665 0
  credits:
    Delp S.L., Loan J.P., Hoy M.G., Zajac F.E., Topp E.L., Rosen J.M., Thelen D.G., Anderson F.C., Seth A. Notes: 3D, 23 DOF gait model created by D.G. Thelen, Univ. of Wisconsin-Madison, and Ajay Seth, Frank C. Anderson, and Scott L. Delp, Stanford University. Lower extremity joint defintions based on Delp et al. (1990). Low back joint and anthropometry based on Anderson and Pandy (1999, 2001). Planar knee model of Yamaguchi and Zajac (1989). Seth replaced tibia translation constraints with a CustomJoint for the knee and removed the patella to eliminate all kinematic constraints; insertions of the quadrucepts are handled with moving points in the tibia frame as defined by Delp 1990. Number of muscles was reduced by Anderson to improve simulation speed for demonstrations and is not intended to be used in research. License: Creative Commons (CCBY 3.0). You are free to distribute, remix, tweak, and build upon this work, even commercially, as long as you credit us for the original creation. http://creativecommons.org/licenses/by/3.0/ More Information: http://simtk-confluence.stanford.edu:8080/display/OpenSim/Gait+2392+and+2354+Models
  publications:
    Delp, S.L., Loan, J.P., Hoy, M.G., Zajac, F.E., Topp E.L., Rosen, J.M.: An interactive graphics-based model of the lower extremity to study orthopaedic surgical procedures, IEEE Transactions on Biomedical Engineering, vol. 37, pp. 757-767, 1990. Yamaguchi G.T., Zajac F.E.: A planar model of the knee joint to characterize the knee extensor mechanism." J . Biomech. vol. 22. pp. 1-10. 1989. Anderson F.C., Pandy M.G.: A dynamic optimization solution for vertical jumping in three dimensions. Computer Methods in Biomechanics and Biomedical Engineering 2:201-231, 1999. Anderson F.C., Pandy M.G.: Dynamic optimization of human walking. Journal of Biomechanical Engineering 123:381-390, 2001.
  BodySet:
    Body ground: mass=0 mass_center=(0 0 0) inertia_xx=0 inertia_yy=0 inertia_zz=0
    Body pelvis: mass=11.777 mass_center=(-0.0707 0 0) inertia_xx=0.1028 inertia_yy=0.0871 inertia_zz=0.0579
        meshes=(sacrum.vtp pelvis.vtp l_pelvis.vtp)
      CustomJoint ground_pelvis: parent_body=ground location_in_parent=(0 0 0) location=(0 0 0)
        Coordinate pelvis_tilt: motion_type=rotational default_value=0 range=(-1.570796 1.570796) clamped=false
        Coordinate pelvis_tx: motion_type=translational default_value=0 range=(-5 5) clamped=false
        Coordinate pelvis_ty: motion_type=translational default_value=0 range=(-1 2) clamped=false
        SpatialTransform: axes_held_at_zero=(rotation2 rotation3 translation3)
          TransformAxis rotation1: coordinates=pelvis_tilt axis=(0 0 1) LinearFunction(coefficients=1 0)
          TransformAxis translation1: coordinates=pelvis_tx axis=(1 0 0) LinearFunction(coefficients=1 0)
          TransformAxis translation2: coordinates=pelvis_ty axis=(0 1 0) LinearFunction(coefficients=1 0)
    Body femur_r: mass=9.3014 mass_center=(0 -0.17 0) inertia_xx=0.1339 inertia_yy=0.0351 inertia_zz=0.1412
        meshes=femur.vtp
      PinJoint hip_r: parent_body=pelvis location_in_parent=(-0.0707 -0.0661 0.0835) location=(0 0 0)
        Coordinate hip_flexion_r: motion_type=rotational default_value=0 range=(-2.094395 2.094395) clamped=false
    Body tibia_r: mass=3.7075 mass_center=(0 -0.1867 0) inertia_xx=0.0504 inertia_yy=0.0051 inertia_zz=0.0511
        meshes=(tibia.vtp fibula.vtp)
      CustomJoint knee_r: parent_body=femur_r location_in_parent=(0 0 0) location=(0 0 0)
        Coordinate knee_angle_r: motion_type=rotational default_value=0 range=(-2.094395 0.1745329) clamped=false
        SpatialTransform: axes_held_at_zero=(rotation2 rotation3 translation3)
          TransformAxis rotation1: coordinates=knee_angle_r axis=(0 0 1) LinearFunction(coefficients=1 0)
          TransformAxis translation1: coordinates=knee_angle_r axis=(1 0 0)
            SimmSpline: x=(-2.0944 -1.74533 -1.39626 -1.0472 -0.698132 -0.349066 -0.174533 0.197344 0.337395 0.490178 1.52146 2.0944)
                y=(-0.0032 0.00179 0.00411 0.0041 0.00212 -0.001 -0.0031 -0.005227 -0.005435 -0.005574 -0.005435 -0.00525)
          TransformAxis translation2: coordinates=knee_angle_r axis=(0 1 0)
            SimmSpline: x=(-2.0944 -1.22173 -0.523599 -0.349066 -0.174533 0.159149 2.0944)
                y=(-0.4226 -0.4082 -0.399 -0.3976 -0.3966 -0.395264 -0.396)
    Body talus_r: mass=0.1 mass_center=(0 0 0) inertia_xx=0.001 inertia_yy=0.001 inertia_zz=0.001 meshes=talus.vtp
      PinJoint ankle_r: parent_body=tibia_r location_in_parent=(0 -0.43 0) location=(0 0 0)
        Coordinate ankle_angle_r: motion_type=rotational default_value=0 range=(-1.570796 1.570796) clamped=false
    Body calcn_r: mass=1.25 mass_center=(0.1 0.03 0) inertia_xx=0.0014 inertia_yy=0.0039 inertia_zz=0.0041
        meshes=foot.vtp
      WeldJoint subtalar_r: parent_body=talus_r location_in_parent=(-0.04877 -0.04195 0.00792) location=(0 0 0)
    Body toes_r: mass=0.2166 mass_center=(0.0346 0.006 -0.0175) inertia_xx=0.0001 inertia_yy=0.0002 inertia_zz=0.0001
        meshes=bofoot.vtp
      PinJoint mtp_r: parent_body=calcn_r location_in_parent=(0.1788 -0.002 0.00108) location=(0 0 0)
        Coordinate mtp_angle_r: motion_type=rotational default_value=0 range=(-1.570796 1.570796) clamped=false
    Body femur_l: mass=9.3014 mass_center=(0 -0.17 0) inertia_xx=0.1339 inertia_yy=0.0351 inertia_zz=0.1412
        meshes=l_femur.vtp
      PinJoint hip_l: parent_body=pelvis location_in_parent=(-0.0707 -0.0661 -0.0835) location=(0 0 0)
        Coordinate hip_flexion_l: motion_type=rotational default_value=0 range=(-2.094395 2.094395) clamped=false
    Body tibia_l_amputated: mass=1.6313 mass_center=(0 -0.0821 0) inertia_xx=0.0221 inertia_yy=0.0022 inertia_zz=0.0225
        meshes=(tibia_l_TTamp.vtp fibula_l_TTamp.vtp)
      CustomJoint knee_l: parent_body=femur_l location_in_parent=(0 0 0) location=(0 0 0)
        Coordinate knee_angle_l: motion_type=rotational default_value=0 range=(-2.094395 0.1745329) clamped=false
        SpatialTransform: axes_held_at_zero=(rotation2 rotation3 translation3)
          TransformAxis rotation1: coordinates=knee_angle_l axis=(0 0 1) LinearFunction(coefficients=1 0)
          TransformAxis translation1: coordinates=knee_angle_l axis=(1 0 0)
            SimmSpline: x=(-2.0944 -1.74533 -1.39626 -1.0472 -0.698132 -0.349066 -0.174533 0.197344 0.337395 0.490178 1.52146 2.0944)
                y=(-0.0032 0.00179 0.00411 0.0041 0.00212 -0.001 -0.0031 -0.005227 -0.005435 -0.005574 -0.005435 -0.00525)
          TransformAxis translation2: coordinates=knee_angle_l axis=(0 1 0)
            SimmSpline: x=(-2.0944 -1.22173 -0.523599 -0.349066 -0.174533 0.159149 2.0944)
                y=(-0.4226 -0.4082 -0.399 -0.3976 -0.3966 -0.395264 -0.396)
    Body pylon_socket: mass=0.3 mass_center=(0 -0.0491 0) inertia_xx=0.0136 inertia_yy=0.0021 inertia_zz=0.0136
        meshes=pylon_socket_passive.stl
      CustomJoint socket: parent_body=tibia_l_amputated location_in_parent=(0.005 -0.215 0) location=(0 0 0)
          reverse=true
        Coordinate socket_flexion: motion_type=rotational default_value=0 range=(-1.2 1.2) clamped=true
        Coordinate socket_pistoning: motion_type=translational default_value=3.095684e-17 range=(-0.02 0.02)
            clamped=false
        SpatialTransform: axes_held_at_zero=(rotation2 rotation3 translation1 translation3)
          TransformAxis rotation1: coordinates=socket_flexion axis=(0 0 1) LinearFunction(coefficients=1 0)
          TransformAxis translation2: coordinates=socket_pistoning axis=(0 1 0) LinearFunction(coefficients=1 0)
    Body foot1: mass=0.3 mass_center=(0.0042 -0.0235 0.0002) inertia_xx=0.0002 inertia_yy=0.0001 inertia_zz=0.0003
        meshes=foot_1.STL
      WeldJoint pros_ankle: parent_body=pylon_socket location_in_parent=(0 -0.192 0)
          orientation_in_parent=(0 0.06 -0.015) location=(0 0 0)
    Body foot2: mass=0.2 mass_center=(0.0157756 -0.00702791 -0.00105711) inertia_xx=0.0001 inertia_yy=0.0002
        inertia_zz=0.0001 meshes=foot.STL
      PinJoint foot_flex: parent_body=foot1 location_in_parent=(0.032 -0.042 0) location=(0 0 0)
        Coordinate foot_flex: motion_type=rotational default_value=0 range=(-1.57 1.57) clamped=false
    Body torso: mass=34.2366 mass_center=(-0.03 0.32 0) inertia_xx=1.4745 inertia_yy=0.7555 inertia_zz=1.4314
        meshes=(hat_spine.vtp hat_jaw.vtp hat_skull.vtp hat_ribs.vtp)
      WeldJoint back: parent_body=pelvis location_in_parent=(-0.1007 0.0815 0) location=(0 0 0)
  ForceSet:
    CoordinateLimitForce hip_limit_r: coordinate=hip_flexion_r upper_stiffness=10 [N*m/degree]
        upper_limit=120 [degrees] lower_stiffness=20 [N*m/degree] lower_limit=-30 [degrees] damping=0.01
        transition=20 [degrees]
    CoordinateLimitForce hip_limit_l: coordinate=hip_flexion_l upper_stiffness=10 upper_limit=120 lower_stiffness=20
        lower_limit=-30 damping=0.01 transition=20
    CoordinateLimitForce knee_limit_r: coordinate=knee_angle_r upper_stiffness=40 upper_limit=0 lower_stiffness=10
        lower_limit=-140 damping=0.01 transition=5
    CoordinateLimitForce knee_limit_l: coordinate=knee_angle_l upper_stiffness=40 upper_limit=0 lower_stiffness=10
        lower_limit=-140 damping=0.01 transition=5
    CoordinateLimitForce ankle_limit_r: coordinate=ankle_angle_r upper_stiffness=10 upper_limit=30 lower_stiffness=10
        lower_limit=-40 damping=0.01 transition=10
    CoordinateLimitForce mtp_limit_r: coordinate=mtp_angle_r upper_stiffness=0.5 upper_limit=0 lower_stiffness=0.5
        lower_limit=0 damping=0.01 transition=5
    CoordinateLimitForce socket_flex: coordinate=socket_flexion upper_stiffness=100 upper_limit=0 lower_stiffness=100
        lower_limit=0 damping=10 transition=5
    CoordinateLimitForce socket_pist: coordinate=socket_pistoning upper_stiffness=10000000000 upper_limit=0
        lower_stiffness=10000000000 lower_limit=0 damping=1000000000 transition=5
    CoordinateLimitForce prosthesis_stiffness: coordinate=foot_flex upper_stiffness=10 upper_limit=0 lower_stiffness=10
        lower_limit=0 damping=1 transition=5
    HuntCrossleyForce foot_r: transition_velocity=0.1
      ContactParametersSet contact_parameters:
        ContactParameters: geometry=(platform r_foot1 r_foot2 r_foot3 r_foot4 r_foot5 r_toes1 r_toes2)
            stiffness=10000000 dissipation=0.7 static_friction=0.9 dynamic_friction=0.9 viscous_friction=0.6
    HuntCrossleyForce foot_l: transition_velocity=0.1
      ContactParametersSet contact_parameters:
        ContactParameters: geometry=(platform l_foot1 l_foot2 l_foot3 l_foot4 l_foot5 l_toes1 l_toes2)
            stiffness=10000000 dissipation=0.7 static_friction=0.9 dynamic_friction=0.9 viscous_friction=0.6
    Millard2012EquilibriumMuscle [values shared by the 16 below unless stated]: min_control=0 max_control=1
        max_contraction_velocity=10 fiber_damping=0.1 activation_time_constant=0.055 [seconds]
        deactivation_time_constant=0.065 [seconds] minimum_activation=0.001
      ActiveForceLengthCurve: minimum_value=0
      ForceVelocityCurve: concentric_slope_at_vmax=0 concentric_slope_near_vmax=0.25 isometric_slope=5
          eccentric_slope_at_vmax=0 eccentric_slope_near_vmax=0.15 max_eccentric_velocity_force_multiplier=1.4
      FiberForceLengthCurve
      TendonForceLengthCurve
    Millard2012EquilibriumMuscle hamstrings_r: max_isometric_force=2700 optimal_fiber_length=0.120753
        tendon_slack_length=0.3611511 pennation_angle_at_optimal=0 [radians]
      PathPoint bifemlh_r-P1: pelvis (-0.139731 -0.113784 0.0770317)
      PathPoint bifemlh_r-P2: tibia_r (-0.0333006 -0.039828 0.0325594)
      PathPoint bifemlh_r-P3: tibia_r (-0.0258882 -0.0622866 0.0379472)
    Millard2012EquilibriumMuscle bifemsh_r: max_isometric_force=804 optimal_fiber_length=0.1916246
        tendon_slack_length=0.09858147 pennation_angle_at_optimal=0.4014257
      PathPoint P1: femur_r (0.00554049 -0.23392 0.0259295)
      PathPoint P2: tibia_r (-0.0333006 -0.039828 0.0325594)
      PathPoint P3: tibia_r (-0.0258882 -0.0622866 0.0379472)
    Millard2012EquilibriumMuscle glut_max_r: max_isometric_force=1944 optimal_fiber_length=0.1629859
        tendon_slack_length=0.140811 pennation_angle_at_optimal=0
      PathPoint glut_max2_r-P1: pelvis (-0.149648 0.0195242 0.0624552)
      PathPoint glut_max2_r-P2: pelvis (-0.152644 -0.0576851 0.101393)
      PathPoint glut_max2_r-P3: femur_r (-0.047205 -0.0587292 0.0324673)
      PathPoint glut_max2_r-P4: femur_r (-0.0172863 -0.112583 0.0464293)
    Millard2012EquilibriumMuscle iliopsoas_r: max_isometric_force=2342 optimal_fiber_length=0.1109071
        tendon_slack_length=0.1774513 pennation_angle_at_optimal=0.1396263
      PathPoint psoas_r-P1: pelvis (-0.0717735 0.0983974 0.0320596)
      PathPoint psoas_r-P2: pelvis (-0.026402 -0.0632317 0.084198)
      ConditionalPathPoint psoas_r-P3: pelvis (-0.0319486 -0.0893009 0.0905212) range=(-1.5708 0.785398)
          coordinate=hip_flexion_r
      PathPoint psoas_r-P4: femur_r (0.00177296 -0.0561806 0.00421078)
      PathPoint psoas_r-P5: femur_r (-0.0208323 -0.0661535 0.0115242)
    Millard2012EquilibriumMuscle rect_fem_r: max_isometric_force=1169 optimal_fiber_length=0.1263389
        tendon_slack_length=0.3435532 pennation_angle_at_optimal=0.08726646
      PathPoint P1: pelvis (-0.0327252 -0.0345001 0.107383)
      ConditionalPathPoint P2: femur_r (0.0370105 -0.446564 0.00210539) range=(-2.61799 -1.45997)
          coordinate=knee_angle_r
      MovingPathPoint P3: tibia_r (0.0673328 0.0234842 0.00154887) x_coordinate=knee_angle_r y_coordinate=knee_angle_r
          z_coordinate=knee_angle_r
        x_location: MultiplierFunction: scale=1.106333
          SimmSpline: x=(-2.0944 -1.99997 -1.5708 -1.45752 -1.39626 -1.0472 -0.698132 -0.526391 -0.349066 -0.174533 0 0.00017453 0.00034907 0.0279253 0.0872665 0.174533 2.0944)
              y=(0.0155805 0.0179938 0.0275081 0.0296564 0.0307615 0.0365695 0.0422074 0.0450902 0.048391 0.0534299 0.0617576 0.0617669 0.0617762 0.0633083 0.066994 0.0733035 0.0573481)
        y_location: MultiplierFunction: scale=1.106333
          SimmSpline: x=(-2.0944 -1.99997 -1.5708 -1.45752 -1.39626 -1.0472 -0.698132 -0.526391 -0.349066 -0.174533 0 0.00017453 0.00034907 0.0279253 0.0872665 0.174533 2.0944)
              y=(0.0234116 0.0237613 0.0251141 0.0252795 0.0253146 0.0249184 0.0242373 0.0238447 0.0234197 0.0227644 0.020984 0.0209814 0.0209788 0.0205225 0.0191754 0.0159554 -0.0673774)
        z_location: MultiplierFunction: scale=1.106333
          SimmSpline: x=(-2.0944 0.1745) y=(0.0014 0.0014)
    Millard2012EquilibriumMuscle vasti_r: max_isometric_force=5000 optimal_fiber_length=0.1185823
        tendon_slack_length=0.1285565 pennation_angle_at_optimal=0.05235988
      PathPoint vas_int_r-P1: femur_r (0.0321349 -0.213198 0.0343511)
      PathPoint vas_int_r-P2: femur_r (0.0371213 -0.230928 0.0315808)
      ConditionalPathPoint vas_int_r-P3: femur_r (0.0380078 -0.446564 0.00609454) range=(-2.61799 -1.42)
          coordinate=knee_angle_r
      MovingPathPoint vas_int_r-P4: tibia_r (0.0602651 0.0281025 0.0019914) x_coordinate=knee_angle_r
          y_coordinate=knee_angle_r z_coordinate=knee_angle_r
        x_location: MultiplierFunction: scale=1.106333
          SimmSpline: x=(-2.0944 -1.99997 -1.5708 -1.45752 -1.39626 -1.0472 -0.698132 -0.526391 -0.349066 -0.174533 0 0.00017453 0.00034907 0.0279253 0.0872665 0.174533 2.0944)
              y=(0.0082733 0.0106866 0.0202042 0.022353 0.0234583 0.0292715 0.0349465 0.037871 0.0412569 0.0465287 0.0554632 0.0554735 0.0554837 0.0571717 0.061272 0.0684368 0.0648818)
        y_location: MultiplierFunction: scale=1.106333
          SimmSpline: x=(-2.0944 -1.99997 -1.5708 -1.45752 -1.39626 -1.0472 -0.698132 -0.526391 -0.349066 -0.174533 0 0.00017453 0.00034907 0.0279253 0.0872665 0.174533 2.0944)
              y=(0.025599 0.0259487 0.0273124 0.0274796 0.0275151 0.0271363 0.0265737 0.0263073 0.0261187 0.0260129 0.0252923 0.0252911 0.0252898 0.0250526 0.0242191 0.0218288 -0.0685706)
        z_location: MultiplierFunction: scale=1.106333
          SimmSpline: x=(-2.0944 2.0944) y=(0.0018 0.0018)
    Millard2012EquilibriumMuscle gastroc_r: max_isometric_force=2500 optimal_fiber_length=0.09953244
        tendon_slack_length=0.3981297 pennation_angle_at_optimal=0.296706
      PathPoint med_gas_r-P1: femur_r (-0.0210539 -0.435372 -0.0260403)
      ConditionalPathPoint med_gas_r-P2: femur_r (-0.033243 -0.445677 -0.0285889) range=(-0.785398 0.174533)
          coordinate=knee_angle_r
      PathPoint med_gas_r-P3: calcn_r (0 0.0338189 -0.00578194)
    Millard2012EquilibriumMuscle soleus_r: max_isometric_force=5137 optimal_fiber_length=0.05526977
        tendon_slack_length=0.2763489 pennation_angle_at_optimal=0.4363323
      PathPoint P1: tibia_r (-0.0026552 -0.169601 0.00785497)
      PathPoint P2: calcn_r (0 0.0338189 -0.00578194)
    Millard2012EquilibriumMuscle tib_ant_r: max_isometric_force=3000 optimal_fiber_length=0.1081398
        tendon_slack_length=0.2460732 pennation_angle_at_optimal=0.08726646
      PathPoint P1: tibia_r (0.0198034 -0.179669 0.0127228)
      PathPoint P2: tibia_r (0.0363984 -0.437112 -0.0195821)
      PathPoint P3: calcn_r (0.127203 0.0194186 -0.0332734)
    Millard2012EquilibriumMuscle hamstrings_l: max_isometric_force=2700 optimal_fiber_length=0.120734
        tendon_slack_length=0.3610944 pennation_angle_at_optimal=0
      PathPoint bifemlh_l-P1: pelvis (-0.139731 -0.113784 -0.0770317)
      PathPoint bifemlh_l-P2: tibia_l_amputated (-0.0333006 -0.039828 -0.0325594)
      PathPoint bifemlh_l-P3: tibia_l_amputated (-0.0258882 -0.0622866 -0.0379472)
    Millard2012EquilibriumMuscle bifemsh_l: max_isometric_force=804 optimal_fiber_length=0.1916222
        tendon_slack_length=0.09858019 pennation_angle_at_optimal=0.4014257
      PathPoint P1: femur_l (0.00554049 -0.23392 -0.0259295)
      PathPoint P2: tibia_l_amputated (-0.0333006 -0.039828 -0.0325594)
      PathPoint P3: tibia_l_amputated (-0.0258882 -0.0622866 -0.0379472)
    Millard2012EquilibriumMuscle glut_max_l: max_isometric_force=1944 optimal_fiber_length=0.1629834
        tendon_slack_length=0.1408088 pennation_angle_at_optimal=0
      PathPoint glut_max2_l-P1: pelvis (-0.149648 0.0195242 -0.0624552)
      PathPoint glut_max2_l-P2: pelvis (-0.152644 -0.0576851 -0.101393)
      PathPoint glut_max2_l-P3: femur_l (-0.047205 -0.0587292 -0.0324673)
      PathPoint glut_max2_l-P4: femur_l (-0.0172863 -0.112583 -0.0464293)
    Millard2012EquilibriumMuscle iliopsoas_l: max_isometric_force=2342 optimal_fiber_length=0.1109048
        tendon_slack_length=0.1774476 pennation_angle_at_optimal=0.1396263
      PathPoint psoas_l-P1: pelvis (-0.0717735 0.0983974 -0.0320596)
      PathPoint psoas_l-P2: pelvis (-0.026402 -0.0632317 -0.084198)
      ConditionalPathPoint psoas_l-P3: pelvis (-0.0319486 -0.0893009 -0.0905212) range=(-1.5708 0.785398)
          coordinate=hip_flexion_l
      PathPoint psoas_l-P4: femur_l (0.00177296 -0.0561806 -0.00421078)
      PathPoint psoas_l-P5: femur_l (-0.0208323 -0.0661535 -0.0115242)
    Millard2012EquilibriumMuscle rect_fem_l: max_isometric_force=1169 optimal_fiber_length=0.1263468
        tendon_slack_length=0.3435747 pennation_angle_at_optimal=0.08726646
      PathPoint P1: pelvis (-0.0327252 -0.0345001 -0.107383)
      ConditionalPathPoint P2: femur_l (0.0370105 -0.446564 -0.00210539) range=(-2.61799 -1.45997)
          coordinate=knee_angle_l
      MovingPathPoint P3: tibia_l_amputated (0.0676008 0.0234132 -0.00154887) x_coordinate=knee_angle_l
          y_coordinate=knee_angle_l z_coordinate=knee_angle_l
        x_location: MultiplierFunction: scale=1.106333
          SimmSpline: x=(-2.0944 -1.99997 -1.5708 -1.45752 -1.39626 -1.0472 -0.698132 -0.526391 -0.349066 -0.174533 0 0.00017453 0.00034907 0.0279253 0.0872665 0.174533 2.0944)
              y=(0.0155805 0.0179938 0.0275081 0.0296564 0.0307615 0.0365695 0.0422074 0.0450902 0.048391 0.0534299 0.0617576 0.0617669 0.0617762 0.0633083 0.066994 0.0733035 0.0573481)
        y_location: MultiplierFunction: scale=1.106333
          SimmSpline: x=(-2.0944 -1.99997 -1.5708 -1.45752 -1.39626 -1.0472 -0.698132 -0.526391 -0.349066 -0.174533 0 0.00017453 0.00034907 0.0279253 0.0872665 0.174533 2.0944)
              y=(0.0234116 0.0237613 0.0251141 0.0252795 0.0253146 0.0249184 0.0242373 0.0238447 0.0234197 0.0227644 0.020984 0.0209814 0.0209788 0.0205225 0.0191754 0.0159554 -0.0673774)
        z_location: MultiplierFunction: scale=1.106333
          SimmSpline: x=(-2.0944 0.1745) y=(-0.0014 -0.0014)
    Millard2012EquilibriumMuscle vasti_l: max_isometric_force=5000 optimal_fiber_length=0.1185871
        tendon_slack_length=0.1285617 pennation_angle_at_optimal=0.05235988
      PathPoint vas_int_l-P1: femur_l (0.0321349 -0.213198 -0.0343511)
      PathPoint vas_int_l-P2: femur_l (0.0371213 -0.230928 -0.0315808)
      ConditionalPathPoint vas_int_l-P3: femur_l (0.0380078 -0.446564 -0.00609454) range=(-2.61799 -1.42)
          coordinate=knee_angle_l
      MovingPathPoint vas_int_l-P4: tibia_l_amputated (0.0605601 0.0280707 -0.0019914) x_coordinate=knee_angle_l
          y_coordinate=knee_angle_l z_coordinate=knee_angle_l
        x_location: MultiplierFunction: scale=1.106333
          SimmSpline: x=(-2.0944 -1.99997 -1.5708 -1.45752 -1.39626 -1.0472 -0.698132 -0.526391 -0.349066 -0.174533 0 0.00017453 0.00034907 0.0279253 0.0872665 0.174533 2.0944)
              y=(0.0082733 0.0106866 0.0202042 0.022353 0.0234583 0.0292715 0.0349465 0.037871 0.0412569 0.0465287 0.0554632 0.0554735 0.0554837 0.0571717 0.061272 0.0684368 0.0648818)
        y_location: MultiplierFunction: scale=1.106333
          SimmSpline: x=(-2.0944 -1.99997 -1.5708 -1.45752 -1.39626 -1.0472 -0.698132 -0.526391 -0.349066 -0.174533 0 0.00017453 0.00034907 0.0279253 0.0872665 0.174533 2.0944)
              y=(0.025599 0.0259487 0.0273124 0.0274796 0.0275151 0.0271363 0.0265737 0.0263073 0.0261187 0.0260129 0.0252923 0.0252911 0.0252898 0.0250526 0.0242191 0.0218288 -0.0685706)
        z_location: MultiplierFunction: scale=1.106333
          SimmSpline: x=(-2.0944 2.0944) y=(-0.0018 -0.0018)
    Millard2012EquilibriumMuscle gastroc_l: max_isometric_force=2500 optimal_fiber_length=0.09951563
        tendon_slack_length=0.3980625 pennation_angle_at_optimal=0.296706
      PathPoint med_gas_l-P1: femur_l (-0.0210539 -0.435372 0.0260403)
      ConditionalPathPoint med_gas_l-P2: femur_l (-0.033243 -0.445677 0.0285889) range=(-0.785398 0.174533)
          coordinate=knee_angle_l
      PathPoint med_gas_l-P3: tibia_l_amputated (0 -0.2 0.00578194)
  ContactGeometrySet:
    ContactHalfSpace platform: body_name=ground location=(0.75 0 0) orientation=(0 0 -1.570796)
    ContactSphere r_foot1: body_name=calcn_r location=(0 -0.01 0) radius=0.01
    ContactSphere r_foot2: body_name=calcn_r location=(0.0425 -0.01 0) radius=0.01
    ContactSphere r_foot3: body_name=calcn_r location=(0.085 -0.01 0) radius=0.01
    ContactSphere r_foot4: body_name=calcn_r location=(0.1275 -0.01 0) radius=0.01
    ContactSphere r_foot5: body_name=calcn_r location=(0.17 -0.01 0) radius=0.01
    ContactSphere r_toes1: body_name=toes_r location=(0.03 -0.01 0) radius=0.01
    ContactSphere r_toes2: body_name=toes_r location=(0.06 -0.01 0) radius=0.01
    ContactSphere l_foot1: body_name=foot2 location=(-0.0840681 -0.0337395 -0.01113) radius=0.01
    ContactSphere l_foot2: body_name=foot2 location=(-0.0416494 -0.0331032 -0.00858154) radius=0.01
    ContactSphere l_foot3: body_name=foot2 location=(-0.000180358 -0.0324811 -0.00977842) radius=0.01
    ContactSphere l_foot4: body_name=foot2 location=(0.0422384 -0.0318448 -0.0123269) radius=0.01
    ContactSphere l_foot5: body_name=foot2 location=(0.0846571 -0.0312084 -0.0148754) radius=0.01
    ContactSphere l_toes1: body_name=foot2 location=(0.123348 -0.0326283 -0.01828) radius=0.01
    ContactSphere l_toes2: body_name=foot2 location=(0.153291 -0.0321791 -0.0200789) radius=0.01
